# Лабораторная работа №1 студентки 1 курса 4 группы Керезь Екатерины
n := 1
x := 2  # Задание 2
4*sqrt(5 - 2*sqrt(6))/((nthroot(3, 4) + nthroot(2, 4))*(nthroot(2, 4) - nthroot(3, 4))) = -4
y := (sqrt(x^3 + n) + cos(|n*x - 1|))/nthroot(x^5 + 8*x + n, 4)
y = 1.33811
t := (sum(sin(i/n), i = 1 .. 10) + sum((i - n)/(i + n), i = 1 .. 5))/product((n + 3i)/(n^2 + n*i - n), i = 1 .. 5)
t = 1.33144 + 0.0505611i
# Задание 3
x := -2, -1.8 .. 2
y(x) := (3^sin(2*x) - cos(2*x)^2)^3
y(x) = [6.53245; 0.555173; 0.000337722; -0.00749284; -0.000309234; 0.00742424; 0.0368054; 0.0118322; -2.89079e-5; -0.00757856; 0; 0.322203; 5.03367; 18.6701; 26.9391; 16.4315; 3.77116; 0.172893; -0.000202364; -0.00677179; 5.46361e-7]
x = [-2; -1.8; -1.6; -1.4; -1.2; -1; -0.8; -0.6; -0.4; -0.2; 0; 0.2; 0.4; 0.6; 0.8; 1; 1.2; 1.4; 1.6; 1.8; 2]
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# Задание 4
A := [4, 9, 7; 5, 3, 1; 0, 8, 5]
B := [85, 63, 415; 252, 35, 25; 87, 2, 6]
V := [75; 522; 25]
C := A*B
C = [3217, 581, 1927; 1268, 422, 2156; 2451, 290, 230]
d := |A|*|B|
d = -82929118
g := transpose(V)*A*V
g = 1521752
S := B*V
S = [49636; 37795; 7719]
E := A^-1*C - B
E = [0, 0, 0; 0, 1.42109e-14, -7.10543e-14; -1.13687e-13, -1.42109e-14, -1.42109e-14]
q := max(A)
q = 9
p := min(B)
p = 2
# Задание 5
a := π/6
b := π
integral((t - 1)*sin(n*t - 2), t = a .. b) = 0.968725
# Задание 6
f(x, y) := sin(x)/x*sin(y)/y
x0 := -6
y0 := -6
dx := 0.2
dy := 0.2
n := 60
i := 0 .. n - 1
j := 0 .. n - 1
x[i] := x0 + i*dx
y[j] := y0 + j*dy
M[i, j] := f(x, y)
# [component: inputs M]
