# Лабораторная работа 2. Решение кравнений и систем уравлений. Керезь Екатерина
# Задание 1
x := -3 .. 3
f(x) := x - sin(x) - 1
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x := 2
root(f(x), x) = 1.93456
x := -3 .. 3
f(x) := (x - 3)*cos(x + 2) - 1
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x := 0
root(f(x), x) = -0.100842
x := 2
root(f(x), x) = 1.76675
# Задание 2
x^4 - 2*x^3 + x^2 - 12*x + 20 = 0
V := [20; -12; 1; -2; 1]
x := polyroots(V)
x = [-1 - 2i; -1 + 2i; 1.99946; 2.00054]
# Задание 3
x1 := 1
x2 := 1
x3 := 1
x4 := 1
Given
2*x1 + x2 + 2*x3 + 3*x4 == 8
3*x1 + 3*x3 == 6
2*x1 - x2 + 3*x4 == 4
x1 + 2*x2 - x3 + 2*x4 == 4
V := Find(x1, x2, x3, x4)
V = [1; 1; 1; 1]
A := [2, 1, 2, 3; 3, 0, 3, 0; 2, -1, 0, 3; 1, 2, -1, 2]
B := [8; 6; 4; 4]
X := A^-1*B
X = [1; 1; 1; 1]
A := [2, 1, 2, 3; 3, 0, 3, 0; 2, -1, 0, 3; 1, 2, -1, 2]
B := [8; 6; 4; 4]
lsolve(A, B) = [1; 1; 1; 1]
# Задание 4
x := 1
y := 1
Given
sin(x) + 2*y == 2
cos(y - 1) + x == 0.7
K := Minerr(x, y)
K = [-0.289809; 1.14288]
