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# Задание 1
limit((sqrt(2*x + 1) - 3)/(sqrt(x - 2) - sqrt(2)), x → 4) → 2*sqrt(2)/3
y(x) := (3^sin(2*x) - cos(2*x)^2)^3
d/dx(y(x)) → 3*(cos(2*x)^2 - 3^sin(2*x))^2*(4*cos(2*x)*sin(2*x) + 2*3^sin(2*x)*cos(2*x)*ln(3))
integral(5*x + 3, x) → (5*x + 3)^2/10
# Задание 2
x - sin(x) - 1 == 0
1.93456321075
(x - 3)*cos(x + 2) - 1 == 0
-0.10084154401
x^4 - 2*x^3 + x^2 - 12*x + 20 == 0
[-1 + 2i; -1 - 2i; 2]
# Задание 3
x1 := -5
x2 := 5
x := x1 .. x2
f1(x) := sqrt(x)
f2(x) := e^x
f3(x) := ln(x)
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# Задание 4
j := 2, 2.25 .. 4
m := 3
a := 1.4*10^-3
j = [2; 2.25; 2.5; 2.75; 3; 3.25; 3.5; 3.75; 4]
F(j) :=
    (sin(a) + j) if j ≥ 3
    (m^2 + j) otherwise
F(j) = [11; 11.25; 11.5; 11.75; 3.0014; 3.2514; 3.5014; 3.7514; 4.0014]
