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# Задание 1
S(x) :=
    z ← (x^2 + 2*x - 3 + (x + 1)*sqrt(x^2 - 9))/(x^2 - 2*x - 3 + (x - 1)*sqrt(x^2 - 9))
    return z
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S(1) = -1.41421i
S(-1) = -0.707107i
S(0) = -1i
S(2) = -2.23607i
# Задание 2
x := 1, 1.5 .. 5
a := 2.5
x = [1; 1.5; 2; 2.5; 3; 3.5; 4; 4.5; 5]
w(x) :=
    (x^3*sqrt(x - a)) if x > a
    (x*sin(a*x)) if x == a
    (e^(-a*x)*cos(a*x)) if x < a
w(x) = [-0.0657619; -0.0192977; 0.0019113; -0.082948; 19.0919; 42.875; 78.3837; 128.87; 197.642]
# Задание 3
j := 2, 2.25 .. 4
m := 3
j = [2; 2.25; 2.5; 2.75; 3; 3.25; 3.5; 3.75; 4]
F(j) :=
    (sin(a) + j) if j ≥ 3
    (m^2 + j) otherwise
F(j) = [11; 11.25; 11.5; 11.75; 3.59847; 3.84847; 4.09847; 4.34847; 4.59847]
