# Лабораторная работа №1 студента 1 курса 4 группы Костюковой Анны
# Задание 3
# Задание 4
# Задание 5
# Задание 6
n := 3
x := 1  # Задание 2
k := -2, -1.8 .. 2
a := π/6
b := π
F(v, o) := e^(sin(v) + sin(o))
v0 := -6
o0 := -6
A := [1, 2, 3; 4, 5, 6; 7, 7, 8]
B := [4, 5, 2; 6, 7, 3; 8, 9, 0]
V := [8; 7; 6]
f(k) := 4*sin(2*k)/cos(3*k)^2 + sqrt(3*k^2)
dv := 0.2
do := 0.2
4*sqrt(5 - 2*sqrt(6))/((nthroot(3, 4) + nthroot(2, 4))*(nthroot(2, 4) - nthroot(3, 4))) = -4
n := 60
integral(cos(t^3)^2 + sqrt(10*t^2), t = a .. b) = 16.5211
g := transpose(V)*A*V
f(k) = [6.74767; 7.51175; 33.2695; -3.15; -1.28132; -1.97904; -5.96755; -71.1828; -21.1606; -1.94032; 0; 2.63314; 22.5463; 73.2612; 8.73883; 5.44315; 5.43824; 7.99975; -27.7269; -1.27637; 0.180534]
d := |A|*|B|
i := 0 .. n - 1
j := 0 .. n - 1
k = [-2; -1.8; -1.6; -1.4; -1.2; -1; -0.8; -0.6; -0.4; -0.2; 0; 0.2; 0.4; 0.6; 0.8; 1; 1.2; 1.4; 1.6; 1.8; 2]
C := A*B
g = 1959
v[i] := v0 + i*dv
o[j] := o0 + j*do
y := (sqrt(x^3 + n) + cos(|n*x - 1|))/nthroot(x^5 + 8*x + n, 4)
y = 2.44236
d = -24
M[i, j] := F(v[i], o[j])
C = [40, 46, 8; 94, 109, 23; 134, 156, 35]
# [component: inputs M]
E := A^-1*C - B
S := B*V
t := (sum(sin(i/n), i = 1 .. 10) + sum((i - n)/(i + n), i = 1 .. 5))/product((n + 3i)/(n^2 + n*i - n), i = 1 .. 5)
t = -3.18428e9 + 812375015i
E = [0, -2.84217e-14, 0; 0, 5.68434e-14, 0; 0, 0, 0]
S = [79; 115; 127]
p := min(B)
q := max(A)
p = 0
q = 8
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# [component: inputs f]
