# Лабораторная работа №2.
# Решение уравнений и систем уравнений
# Задание 2.
# Задание 3
1.
x1 := 1
x2 := 1
x3 := 1
x4 := 1
g(w) := w^4 - 14*w^2 - 40*w - 75
# Задание 1.
Given
x := -3 .. 3
9*x1 + 10*x2 - 7*x3 - x4 == 23
f(x) := 2*x + sin(x) - 1
7*x1 - x3 - 5*x4 == 37
V := [-75; -40; -14; 1]
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5*x1 - 2*x3 + x4 == 22
4*x1 + x2 + 2*x3 + 3*x4 == 26
D := Find(x1, x2, x3, x4)
w := polyroots(V)
w = [-1.33475 - 1.64854i; -1.33475 + 1.64854i; 16.6695]
D = [5.51752; -0.80593; 2.68733; -0.212938]
2.
x := 2
A := [9, 10, -7, -1; 7, 0, -1, -5; 5, 0, -2, 1; 4, 1, 2, 3]
B := [23; 37; 22; 26]
root(f(x), x) = 0.335418
p := -3 .. 3
X := A^-1*B
f(p) := e^(p + 1) + p^2 - 4
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X = [5.51752; -0.80593; 2.68733; -0.212938]
3.
B := [23; 37; 22; 26]
A := [9, 10, -7, -1; 7, 0, -1, -5; 5, 0, -2, 1; 4, 1, 2, 3]
p := 2
root(f(p), p) = 0.354392
lsolve(A, B) = [5.51752; -0.80593; 2.68733; -0.212938]
p := -2
root(f(p), p) = -1.89511
# Задание 4
n := 1
m := 1
Given
cos(n) + m == 1.5
2*n - sin(m - 0.5) == 1
K := Minerr(n, m)
K = [0.581926; 0.664594]
