# Лабораторная работа №3.
# Символьные вычисления. Функция IF.
# Задание 1
limit((y^3 + 3*y^2 + 2*y)/(y^2 - y - 6), y → -2) → -2/5
y(x) := 4*sin(2*x)/cos(3*x)^2 + sqrt(3*x^2)
d/dx(y(x)) → 8*cos(2*x)/cos(3*x)^2 + 24*sin(2*x)*sin(3*x)/cos(3*x)^3 + sqrt(3)*x/sqrt(x^2)
integral(1/sqrt(9 - 25*x^2), x) → asin(5*x/3)/5
# Задание 2
2*x + sin(x) - 1 == 0
0.335418032385
e^(x + 1) + x^2 - 4 == 0
0.354392372658
x^4 - 14*x^2 - 40*x - 75 == 0
[-1 + 2i; -1 - 2i; 5; -3]
# Задание 3
x1 := -5
x2 := 5
x := x1 .. x2
f1(x) := sqrt(x)
f2(x) := e^x
f3(x) := ln(x)
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# Задание 4
k := 6
b := -1.74
i := 0, 0.5 .. 3
i = [0; 0.5; 1; 1.5; 2; 2.5; 3]
F(i) :=
    cos(i + b) if i < 1.5
    (i + k^2) otherwise
F(i) = [-0.168397; 0.324796; 0.738469; 37.5; 38; 38.5; 39]
# Задание 4
a := 1.5
k := 6
b := -1.74
i := 0
F := if(i < a, cos(i + b), i + k^2)
F = -0.168397
i := 0.5
F := if(i < a, cos(i + b), i + k^2)
F = 0.324796
i := 1
F := if(i < a, cos(i + b), i + k^2)
F = 0.738469
i := 1.5
F := if(i < a, cos(i + b), i + k^2)
F = 37.5
i := 2
F := if(i < a, cos(i + b), i + k^2)
F = 38
i := 2.5
F := if(i < a, cos(i + b), i + k^2)
F = 38.5
i := 3
F := if(i < a, cos(i + b), i + k^2)
F = 39
