# Задание 3
k := 6
b := -1.74
i := 0, 0.5 .. 3
i = [0; 0.5; 1; 1.5; 2; 2.5; 3]
F(i) :=
    cos(i + b) if i < 1.5
    (i + k^2) otherwise
F(i) = [-0.168397; 0.324796; 0.738469; 37.5; 38; 38.5; 39]
# Задание 1
S(m) :=
    z ← sqrt((3*m + 2)^2 - 24*m)/(3*sqrt(m) - 2/sqrt(m))
    return z
S(1) = 1
S(2) = 1.41421
S(3) = 1.73205
S(4) = 2
# Задание 2
a := 1.5
x := 0.8, 0.95 .. 2
y(x) :=
    y ← π*x^2 - 7/x^2 if x < 1.3
    y ← a*x^3 + 7*sqrt(x) if x == 1.3
    y ← ln(x + 7*sqrt(x)) if x > 1.3
    return y
y(x) = [-8.92688; -4.92095; -1.9838; 0.428739; 2.27032; 2.32873; 2.38203; 2.43107; 2.4765]
