# Лабораторная работа №1 студента, который очень сильно должен, 6 группы Козловского Андрея
# Задание 2
n := 4
x := 4
4*sqrt(5 - 2*sqrt(6))/((nthroot(3, 4) + nthroot(2, 4))*(nthroot(2, 4) - nthroot(3, 4))) = -4
y := (sqrt(x^3 + n) + cos(|n*x - 1|))/nthroot(x^5 + 8*x + n, 4)
y = 1.31206
t := (sum(sin(i/n), i = 1 .. 10) + sum((i - n)/(i + n), i = 1 .. 5))/product((n + 3i)/(n^2 + n*i - n), i = 1 .. 5)
t = -14274.4 + 1085.7i
# Задание 3
x := -2, -1.8 .. 2
y(x) := sqrt((3*x^2 + 4*x - 1)/(2*x^2 + 6))
x = [-2; -1.8; -1.6; -1.4; -1.2; -1; -0.8; -0.6; -0.4; -0.2; 0; 0.2; 0.4; 0.6; 0.8; 1; 1.2; 1.4; 1.6; 1.8; 2]
y(x) = [0.46291; 0.348991; 0.158682; 0.269408i; 0.408248i; 0.5i; 0.559631i; 0.58757i; 0.579174i; 0.525657i; 0.408248i; 0.114708i; 0.413384; 0.607493; 0.752286; 0.866025; 0.95625; 1.02784; 1.08455; 1.12944; 1.16496]
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# Задание 4
A := [1, 2, 69; 4, 5, 6; 7, 7, 8]
B := [4, 5, 2; 6, 7, 3; 8, 9, 1]
V := [8; 7; 6]
g := transpose(V)*A*V
d := |A|*|B|
C := A*B
g = 5127
d = -2790
C = [568, 640, 77; 94, 109, 29; 134, 156, 43]
E := A^-1*C - B
S := B*V
E = [-1.42109e-14, -2.84217e-14, -7.10543e-15; 0, 1.42109e-14, 3.55271e-15; 0, -1.77636e-15, 0]
S = [79; 115; 133]
p := min(B)
q := max(A)
p = 1
q = 69
# Задание 5
a := -π/2
b := π/2
integral(sin(2*t)^2 + cos(t)*sqrt(n*t^2), t = a .. b) = 3.85398
# Задание 6
f(x, y) := x^2 - y^2
x0 := -5
y0 := -5
dx := 0.2
dy := 0.2
n := 50
i := 0 .. n - 1
j := 0 .. n - 1
x[i] := x0 + i*dx
y[j] := y0 + j*dy
M[i, j] := f(x[i], y[j])
# [component: inputs M]
