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# Задание 1
x := -3 .. 3
f(x) := e^x - 6*x - 3
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x := 0
root(f(x), x) = -0.386795
x := -3 .. 3
f(x) := (x - 2)*sin(x) - 1
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x := -2
root(f(x), x) = -2.93766
x := 0
root(f(x), x) = -0.425047
# Задание 2
g(x) := x^4 - x^3 + x^2 - 11*x + 10
V := [10; -11; 1; -1; 1]
x := polyroots(V)
x = [-1 - 2i; -1 + 2i; 1; 2]
# Задание 3
1.
x1 := 1
x2 := 1
x3 := 1
x4 := 1
Given
6*x1 - x2 + 10*x3 - x4 == 158
2*x1 + x2 + 10*x3 + 7*x4 == 128
3*x1 - 2*x2 - 2*x3 - x4 == 7
x1 - 12*x2 + 2*x3 - x4 == 17
D := Find(x1, x2, x3, x4)
D = [10; 1; 10; 1]
2.
A := [6, -1, 10, -1; 2, 1, 10, 7; 3, -2, -2, -1; 1, -12, 2, -1]
B := [158; 128; 7; 17]
X := A^-1*B
X = [10; 1; 10; 1]
3.
A := [6, -1, 10, -1; 2, 1, 10, 7; 3, -2, -2, -1; 1, -12, 2, -1]
B := [158; 128; 7; 17]
lsolve(A, B) = [10; 1; 10; 1]
# Задание 4
x := 1
y := 1
Given
cos(x + 0.5) + y == 0.8
sin(y) - 2*x == 1.6
V := Minerr(x, y)
V = [-0.866581; -0.133558]
