# Лабораторная работа №3.
# Символьные вычисления. Функция IF.
# Задание 1
limit((1 - 2*cos(v))/sin(v - π/3), v → π/3) → sqrt(3)
y(x) := ln(sqrt((3*x^2 - 4)/(3*x^2 + 4)))
d/dx(y(x)) → (6*x/(3*x^2 + 4) - 6*x*(3*x^2 - 4)/(3*x^2 + 4)^2)*(3*x^2 + 4)/(2*(3*x^2 - 4))
integral(1/(sin(x)^2*nthroot(x, 4)), x)
# Задание 2
e^x - 6*x - 3 == 0
-LambertW(-1/6*e^(-1/2)) - 1/2
(x - 2)*sin(x) - 1 == 0
-0.425046576083
x^4 - x^3 + x^2 - 11*x + 10 == 0
[-1 + 2i; -1 - 2i; 2; 1]
# Задание 3
x1 := -5
x2 := 5
x := x1 .. x2
f1(x) := sqrt(x)
f2(x) := e^x
f3(x) := ln(x)
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# Задание 4
b := 2.9
j := 6
a := 1105*10^-8
i := b, b - 0.1 .. 2
i = [2.9; 2.8; 2.7; 2.6; 2.5; 2.4; 2.3; 2.2; 2.1; 2]
F(i) :=
    i + sin(b)^2 if i > 2.5
    (i*a + j^2) otherwise
F(i) = [2.95724; 2.85724; 2.75724; 2.65724; 36; 36; 36; 36; 36; 36]
