# Задание 1
S(m) :=
    z ← sqrt((3*m + 2)^2 - 24*m)/(3*sqrt(m) - 2/sqrt(m))
    return z
S(1) = 1
S(2) = 1.41421
S(3) = 1.73205
S(4) = 2
# Задание 2
a := 0.3
i := 1 .. 10
n := 10
z(i) :=
    z ← a*sin((i^2 + 1)/n) if sin((i^2 + 1)/n) > 0
    z ← cos(i + 1/n) if sin((i^2 + 1)/n) < 0
    return z
z(i) = [0.0596008; 0.143828; 0.252441; 0.297499; 0.15465; 0.983268; 0.684547; 0.064536; 0.282219; -0.780568]
# Задание 3
b := 2.9
j := 6
a := 1105*10^-8
i := b, b - 0.1 .. 2
i = [2.9; 2.8; 2.7; 2.6; 2.5; 2.4; 2.3; 2.2; 2.1; 2]
F(i) :=
    i + sin(b)^2 if i > 2.5
    (i*a + j^2) otherwise
F(i) = [2.95724; 2.85724; 2.75724; 2.65724; 36; 36; 36; 36; 36; 36]
